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/batch
! ANSYS input file written by Workbench version 2021 R1
! File used for geometry attach: C:\Users\[REDACTED]\Documents (Local Uni PC)\Ansys Data\060927 linearelem\linearelement_files\dp0\SYS\DM\SYS.scdoc
/title,linearelement--Static Structural (A5)
/com,--- Data in consistent NMM units. See Solving Units in the help system for more information.
/units,MPA
/prep7
! Turn off shape checking because checks already performed inside WB mesher.
! See help system for more information.
SHPP,OFF,,NOWARN
etcon,set             ! allow ANSYS to choose best KEYOP's for 180x elements, resets any applicable keyopt to MAPDL defaults
/com,*********** Nodes for the whole assembly ***********
nblock,3,,33441
(1i9,3e20.9e3)
        1     5.000000000E+01     5.000000000E+01     0.000000000E+00
        2     5.000000000E+01    -5.000000000E+01     0.000000000E+00
..REDACTED...
    30400     5.000000000E+01    -4.749650417E+01     0.000000000E+00
    30401     5.000000000E+01    -4.849642870E+01     0.000000000E+00
-1
/com,*********** Elements for Body 1 "SYS\Surface" ***********
et,1,183
keyo,1,3,3
eblock,19,solid,,10000
(19i9)
        1        1        1        1        0        0        0        0        8        0        1    10102        5    10103        1    10212    10213    10203    10202
        1        1        1        1        0        0        0        0        8        0        2    10101      104        5    10102    10510    10211    10212    30303
...REDACTED...
        1        1        1        1        0        0        0        0        8        0     9999     9805     9904     9903     9706    30008    30107    29810    29809
        1        1        1        1        0        0        0        0        8        0    10000     9905        4     9904     9805    10209    10208    30008    30009
-1
/com,*********** Send User Defined Coordinate System(s) ***********
csys,0
toffst,273.15,  ! Temperature offset from absolute zero
/com,*********** Set Reference Temperature ***********
tref,22.
/com,*********** Send Materials ***********

TB,BISO,1,1,
TBDATA,1,0.00032,0.000575
MP,EX,1,190000,	! tonne s^-2 mm^-1
MP,NUXY,1,0.28,

/com,*********** Send Sheet Properties ***********
r,1,1.

! ****** Begin Command Snippet ******
*dim,matids,,1
*set,matids(1),1
*set,matid,1
*dim,typeids,,1
*set,typeids(1),1
!   Commands inserted into this file will be executed just after material definitions in /PREP7.
!   The material number for this body is equal to the parameter "matid" if it's not a part of a Material Assignment.
!   The element type numbers for this body can be referenced using the 1-D array parameter "typeids".

!   Active UNIT system in Workbench when this object was created:  Metric (mm, kg, N, s, mV, mA)
!   NOTE:  Any data that requires units (such as mass) is assumed to be in the consistent solver unit system.
!                See Solving Units in the help system for more information.


!Define constants
*SET,sig_max,0.0005
*SET,sig_min,0.0002
*SET,H_max,0.000575
*SET,H_min,0.0003
*SET,L_1,100 !width of geometry in mm

!Get number of elements
!GET, Par, Entity, ENTNUM, Item1, IT1NUM
*GET,par_elemcount,ELEM,,COUNT

!Create arrays for each centroid positions
!DIM, Par, Type, IMAX, JMAX
*DIM,centarray,ARRAY,par_elemcount,2

!Assign element IDs and Centroid positions to centarray
!VGET Retrieves values and stores them into an array parameter.
*VGET,centarray(1,1),ELEM,,ELIST  !Element IDs
*VGET,centarray(1,2),ELEM,,CENT,X

!Loop through each element
!defines do loop !*DO, Par, IVAL, FVAL, INC
*DO,i,1,par_elemcount,1

!test i value
*SET,par_testi,i

!Get x-coordinate of element centroid
*SET,x_pos,centarray(i,2)

!calc material prop for element
H=((H_max-H_min)/L_1)*x_pos + H_min
sig=((sig_max-sig_min)/L_1)*x_pos + sig_min

!Assign material prop to element
!TB,lab,MAT,NTEMP,NPTS,TBLPT,EOSPT,FuncName
!TB,bilinear isometric hardening, matid=1, no. of temp pts=1,
!no. of pts=n/a for biso, eq of state=n/a, funcname=n/a
TB,BISO,2,1,,,

!TBDATA,STLOC,C1,C2
!TBDATA, starting location, 1st const, 2nd const.
TBDATA,2,sig,H
MP,EX,2,190000,	! tonne s^-2 mm^-1
MP,NUXY,2,0.28,

MPCHG,2,i !only updating 1 ele at a time. inefficient

*ENDDO
!end loop
*set, matids, ,
*set, typeids, ,
! ****** End   Command Snippet ******
!************************* Model Summary ********************
!SYS\Surface,	Binlinear Iso Material,	matid,	1
!************************* End Model Summary ********************
/com,*********** Fixed Supports ***********
CMBLOCK,_FIXEDSU,NODE,        1
(8i10)
      9961
cmsel,s,_FIXEDSU
d,all,all
nsel,all
/com,********* Frictionless Supports X *********
CMBLOCK,_FRICSUX,NODE,      200
(8i10)
         3         4      9905      9906      9907      9908      9909      9910
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
cmsel,s,_FRICSUX
d,all,ux,0
nsel,all
tblist
fini
/com,****************************************************************************
/com,*************************    SOLUTION       ********************************
/com,****************************************************************************
/solu
antype,0                   ! static analysis
_thickRatio=  0     ! Ratio of thick parts in the model
eqsl,sparse,,,,,1
cntr,print,1               ! print out contact info and also make no initial contact an error
dmpoption,emat,no             ! Don't combine emat file for DANSYS
dmpoption,esav,no             ! Don't combine esav file for DANSYS
nldiag,cont,iter           ! print out contact info each equilibrium iteration
rescontrol,define,last,last,,dele	   ! Program Controlled
/com,****************************************************
/com,******************* SOLVE FOR LS 1 OF 1 ****************
/com,*** Set Displacements ***
CMBLOCK,_CM41UX_XP,NODE,      201
(8i10)
         1         2     10103     10104     10105     10106     10107     10108
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cmsel,s,_CM41UX_XP
d,all,ux,3.e-002
nsel,all

/com,*** Component For All Non-Zero UX Displacements ***
cmsel,s,_CM41ux_xp
cm,_DISPNONZEROUX,NODE
nsel,all

autots,on                  ! Workbench Program Controlled automatic time stepping
nsub,5,1000,1              ! due to presence of nonlinear materials
time,1.
outres,erase
outres,all,none
outres,nsol,all,
outres,rsol,all
outres,eangl,all
outres,etmp,all
outres,veng,all
outres,strs,all,
outres,epel,all,
outres,eppl,all,
outres,cont,all,
! *********** WB SOLVE COMMAND ***********
! check interactive state
*get,ANSINTER_,active,,int
*if,ANSINTER_,ne,0,then
/eof
*endif
solve
/com *************** Write FE CONNECTORS *********
CEWRITE,file,ce,,INTE
/com,****************************************************
/com,*************** FINISHED SOLVE FOR LS 1 *************
/post1
fini
